<neuroml xmlns="http://www.neuroml.org/schema/neuroml2"  xmlns:xs="http://www.w3.org/2001/XMLSchema" xmlns:xsi="http://www.w3.org/2001/XMLSchema-instance" xsi:schemaLocation="http://www.neuroml.org/schema/neuroml2 https://raw.github.com/NeuroML/NeuroML2/development/Schemas/NeuroML2/NeuroML_v2beta5.xsd" id="ChannelWorm_EGL36_35_3">
    <ionChannelHH id="ChannelWorm_EGL36_35_3" species="K" conductance="10pS">

        <annotation>
            <rdf:RDF xmlns:rdf="http://www.w3.org/1999/02/22-rdf-syntax-ns#" xmlns:bqmodel="http://biomodels.net/model-qualifiers/" xmlns:bqbiol="http://biomodels.net/biology-qualifiers/">
                <!-- This is an ion channel model NeuroML2 file generated by ChannelWorm: https://github.com/openworm/ChannelWorm -->
                <rdf:Description rdf:about="ChannelWorm_EGL36_35_3">
                    <bqmodel:isDerivedFrom>
                        <rdf:Bag>
                            <rdf:li rdf:resource="ChannelWorm channel Name: EGL36 channel ID: 35, ModelID: 3"/>
                        </rdf:Bag>
                    </bqmodel:isDerivedFrom>
                    <bqmodel:isDescribedBy>
                        <rdf:Bag>
                            <!-- DOI: 10.1016/S0896-6273(00)80355-4, PubMed ID: 9247271
                                 Behavioral defects in C. elegans egl-36 mutants result from potassium channels shifted in voltage-dependence of activation. (Johnstone DB; Wei A; Butler A; Salkoff L; Thomas JH. Neuron, 19(1):151-64) -->
                            <rdf:li rdf:resource="http://identifiers.org/pubmed/9247271"/>
                        </rdf:Bag>
                    </bqmodel:isDescribedBy>
                    <bqbiol:hasTaxon>
                        <rdf:Bag>
                            <!-- Known species: caenorhabditis elegans; taxonomy id: 6239 -->
                            <rdf:li rdf:resource="http://identifiers.org/taxonomy/6239"/>
                        </rdf:Bag>
                    </bqbiol:hasTaxon>
                </rdf:Description>
            </rdf:RDF>
        </annotation>

        <gateHHtauInf id="vda" instances="1">
            <timeCourse type="fixedTimeCourse" tau="0.0253990016 s"/>
            <steadyState type="HHSigmoidVariable" rate="1" midpoint="0.0602673501 V" scale="0.0195933741 V"/>
        </gateHHtauInf>
    </ionChannelHH>
</neuroml>
