<neuroml xmlns="http://www.neuroml.org/schema/neuroml2"  xmlns:xs="http://www.w3.org/2001/XMLSchema" xmlns:xsi="http://www.w3.org/2001/XMLSchema-instance" xsi:schemaLocation="http://www.neuroml.org/schema/neuroml2 https://raw.github.com/NeuroML/NeuroML2/development/Schemas/NeuroML2/NeuroML_v2.1.xsd" id="IafNet">
    <include href="cells/olm.cell.nml"/>
    <pulseGenerator id="pulseGen0" delay="100ms" duration="800ms" amplitude="100 pA"/>
    <network id="TestOLMChannels" temperature="35degC">
        <notes>A test network model: TestOLMChannels</notes>
        <population id="olmpop" component="olmcell" size="1" type="populationList">
            <instance id="0">
                <location x="0." y="0." z="0."/>
            </instance>
        </population>
        <inputList id="il" population="olmpop" component="pulseGen0">
            <input id="0" target="../olmpop/0/olmcell" destination="synapses"/>
        </inputList>
    </network>
</neuroml>
