<?xml version="1.0" encoding="ISO-8859-1"?>
<neuroml xmlns="http://www.neuroml.org/schema/neuroml2" xmlns:xsi="http://www.w3.org/2001/XMLSchema-instance" xsi:schemaLocation="http://www.neuroml.org/schema/neuroml2 https://raw.github.com/NeuroML/NeuroML2/development/Schemas/NeuroML2/NeuroML_v2beta4.xsd" id="Ca_conc">

    <notes>ChannelML file describing intracellular Calcium dynamics, from the Hippocampal CA3 neuron model presented in Traub et al., 1991.</notes>

    <fixedFactorConcentrationModel id="Ca_conc" restingConc="0.0mM" decayConstant="0.1s" ion="ca" rho="9543.150099999999mol_per_m_per_A_per_s"/>

</neuroml>
