<?xml version="1.0" encoding="UTF-8"?>
<neuroml xmlns="http://www.neuroml.org/schema/neuroml2" xmlns:xsi="http://www.w3.org/2001/XMLSchema-instance" xsi:schemaLocation="http://www.neuroml.org/schema/neuroml2  https://raw.githubusercontent.com/NeuroML/NeuroML2/development/Schemas/NeuroML2/NeuroML_v2beta4.xsd" id="network_ACnet2">

    <notes>

Network structure (NeuroML 2beta4) for project: ACnet2 saved with neuroConstruct v1.7.1 on: 15:53:21, 02-Oct-14

Cell Group: pyramidals contains 1 cells
Cell Group: baskets contains 1 cells

    </notes>

    <include href="Ca_conc.nml"/>
    <include href="Ca_pyr.channel.nml"/>
    <include href="Kahp_pyr.channel.nml"/>
    <include href="Kdr_pyr.channel.nml"/>
    <include href="LeakConductance_pyr.channel.nml"/>
    <include href="Na_pyr.channel.nml"/>
    <include href="pyr_4_sym.cell.nml"/>

    <pulseGenerator id="Input_1" delay="0.1s" duration="0.5s" amplitude="6.0E-10A"/>

    <network id="network" type="networkWithTemperature" temperature="6.3 degC">

        <population id="pyramidals" component="pyr_4_sym" type="populationList" size="1">
            <instance id="0">
                <location x="400.0" y="-200.0" z="0.0"/>
            </instance>
        </population>

            <!--There are no synaptic connections present in the network-->

        <inputList id="Input_1" component="Input_1" population="pyramidals">
            <input id="0" target="../pyramidals/0/pyr_4_sym" destination="synapses"/>
        </inputList>

    </network>

</neuroml>
