<neuroml xmlns="http://www.neuroml.org/schema/neuroml2"  xmlns:xs="http://www.w3.org/2001/XMLSchema" xmlns:xsi="http://www.w3.org/2001/XMLSchema-instance" xsi:schemaLocation="http://www.neuroml.org/schema/neuroml2 https://raw.github.com/NeuroML/NeuroML2/development/Schemas/NeuroML2/NeuroML_v2.2.xsd" id="network">
    <notes>HH cell network</notes>
    <include href="HH_example_cell.nml"/>
    <pulseGenerator id="pg" delay="100ms" duration="100ms" amplitude="0.08nA">
        <notes>Simple pulse generator</notes>
    </pulseGenerator>
    <network id="single_hh_cell_network">
        <population id="pop0" component="hh_cell" size="2">
            <notes>A population for our cell</notes>
        </population>
        <populationList id="pop1" component="hh_cell">
            <notes>A populationList for our cell</notes>
            <instance id="0">
                <location x="0" y="0" z="0" />
            </instance>
            <instance id="1">
                <location x="0" y="0" z="0" />
            </instance>
        </populationList>
        <explicitInput target="pop0[0]" input="pg"/>
    </network>
</neuroml>
