<?xml version="1.0" encoding="ISO-8859-1"?>
<neuroml xmlns="http://www.neuroml.org/schema/neuroml2" xmlns:xsi="http://www.w3.org/2001/XMLSchema-instance" xsi:schemaLocation="http://www.neuroml.org/schema/neuroml2 https://raw.github.com/NeuroML/NeuroML2/development/Schemas/NeuroML2/NeuroML_v2beta4.xsd" id="Kd">

    <notes>NeuroML file containing a single Channel description</notes>

    <ionChannel id="Kd" conductance="10pS" type="ionChannelHH" species="k">

        <notes>Kd current

Comment from original mod file:
Based on Kd model of Foust et al. (2011)</notes>

        <annotation>
            <rdf:RDF xmlns:rdf="http://www.w3.org/1999/02/22-rdf-syntax-ns#">
                <rdf:Description rdf:about="Kd">

                    <bqmodel:isDerivedFrom xmlns:bqmodel="http://biomodels.net/biology-qualifiers/">
                        <rdf:Bag>
                            <rdf:li>Somatic membrane potential and Kv1 channels control spike repolarization in cortical axon collaterals and presynaptic boutons
                            Foust AJ, Yu Y, Popovic M, Zecevic D, McCormick DA (2011), The Journal of Neuroscience 31(43):15490-15498</rdf:li>
                            <rdf:li rdf:resource="http://www.ncbi.nlm.nih.gov/pubmed/22031895"/>
                        </rdf:Bag>
                    </bqmodel:isDerivedFrom>

                    <bqbiol:isVersionOf xmlns:bqbiol="http://biomodels.net/biology-qualifiers/">
                        <rdf:Bag>
                            <rdf:li>K channels</rdf:li>
                            <rdf:li rdf:resource="http://senselab.med.yale.edu/neurondb/channelGene2.aspx#table3"/>
                        </rdf:Bag>
                    </bqbiol:isVersionOf>

                </rdf:Description>
            </rdf:RDF>
        </annotation>

        <gate id="m" type="gateHHtauInf" instances="1">
            <!--  Note: qt defined in Kd.mod, but not used!
            <q10Settings type="q10ExpTemp" q10Factor="2.3" experimentalTemp="23 degC"/> -->
            <timeCourse type="fixedTimeCourse" tau="1 ms"/>
            <steadyState type="HHSigmoidVariable" rate="1" scale="8mV" midpoint="-43mV"/>
        </gate>

        <gate id="h" type="gateHHtauInf" instances="1">
            <!--  Note: qt defined in Kd.mod, but not used!
            <q10Settings type="q10ExpTemp" q10Factor="2.3" experimentalTemp="23 degC"/> -->
            <timeCourse type="fixedTimeCourse" tau="1500 ms"/>
            <steadyState type="HHSigmoidVariable" rate="1" scale="-7.3mV" midpoint="-67mV"/>
        </gate>

    </ionChannel>

</neuroml>
