<neuroml xmlns="http://www.neuroml.org/schema/neuroml2"  xmlns:xs="http://www.w3.org/2001/XMLSchema" xmlns:xsi="http://www.w3.org/2001/XMLSchema-instance" xsi:schemaLocation="http://www.neuroml.org/schema/neuroml2 https://raw.github.com/NeuroML/NeuroML2/development/Schemas/NeuroML2/NeuroML_v2beta5.xsd" id="NeuroML2_file_exported_from_NEURON">
    <include href="./L23_channels/pas.channel.nml"></include>
    <include href="./L23_channels/Ih.channel.nml"></include>
    <include href="./L23_channels/NaTs2_t.channel.nml"></include>
    <include href="./L23_channels/SKv3_1.channel.nml"></include>
    <include href="./L23_channels/Im.channel.nml"></include>
    <include href="./L23_channels/NaTa_t.channel.nml"></include>
    <include href="./L23_channels/K_Tst.channel.nml"></include>
    <include href="./L23_channels/Nap_Et2.channel.nml"></include>
    <include href="./L23_channels/SK_E2.channel.nml"></include>
    <include href="./L23_channels/Ca_HVA.channel.nml"></include>
    <include href="./L23_channels/K_Pst.channel.nml"></include>
    <include href="./L23_channels/CaDynamics_E2_NML2.nml"></include>
    <include href="./L23_channels/Ca_LVAst.channel.nml"></include>
    <cell id="L23_PC_simplified">
        <notes>

Simplified version of a cell from the BBP NeocorticalMicrocircuit Collaboration Portal

</notes>
        <morphology id="morphology">
            <segment id="0" name="Seg0_soma_0">
                <proximal x="2.575320e-01" y="-8.049430e+00" z="0.000000e+00" diameter="3.02824"/>
                <distal x="1.803480e-01" y="-7.222060e+00" z="0.000000e+00" diameter="5.30997"/>
            </segment>
            <segment id="2" name="Seg1_soma_0">
                <parent segment="0" fractionAlong="1"/>
                <distal x="1.031640e-01" y="-6.394700e+00" z="0.000000e+00" diameter="7.92274"/>
            </segment>
            <segment id="3" name="Seg2_soma_0">
                <parent segment="2" fractionAlong="1"/>
                <distal x="2.597970e-02" y="-5.567330e+00" z="0.000000e+00" diameter="9.3539"/>
            </segment>
            <segment id="4" name="Seg3_soma_0">
                <parent segment="3" fractionAlong="1"/>
                <distal x="-5.120450e-02" y="-4.739960e+00" z="0.000000e+00" diameter="10.7851"/>
            </segment>
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            <segmentGroup neuroLexId="sao864921383" id="soma_0">
                <notes>This group contains an unbranched set of segments, and all of the segmentGroups marked with
             neuroLexId = sao864921383 form a non-overlapping set of all of the segments.
             These segmentGroups correspond to the 'cables' of NeuroML v1.8.1, and map to/from NEURON sections.</notes>
                <member segment="0"/>
                <member segment="2"/>
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            </segmentGroup>
            <segmentGroup neuroLexId="sao864921383" id="apic_0">
                <notes>This group contains an unbranched set of segments, and all of the segmentGroups marked with
             neuroLexId = sao864921383 form a non-overlapping set of all of the segments.
             These segmentGroups correspond to the 'cables' of NeuroML v1.8.1, and map to/from NEURON sections.</notes>
                <member segment="750"/>
                <member segment="751"/>
                <member segment="752"/>
                <member segment="753"/>
            </segmentGroup>
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            <segmentGroup id="all">
                <include segmentGroup="soma_0"/>
                <include segmentGroup="apic_0"/>
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            </segmentGroup>
            <segmentGroup id="ModelViewParmSubset_37">
                <include segmentGroup="soma_0"/>
                <include segmentGroup="apic_0"/>
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            </segmentGroup>
            <segmentGroup id="ModelViewParmSubset_38">
                <include segmentGroup="soma_0"/>
                <include segmentGroup="axon_0"/>
                <include segmentGroup="axon_1"/>
            </segmentGroup>
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            <segmentGroup id="basal">
                <include segmentGroup="dend_0"/>
                <include segmentGroup="dend_1"/>
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                <inhomogeneousParameter id="PathLengthOver_basal" variable="p" metric="Path Length from root">
                    <proximal translationStart="0.000000e+00"/>
                </inhomogeneousParameter>
            </segmentGroup>
            <segmentGroup id="apical">
                <include segmentGroup="apic_0"/>
                <include segmentGroup="apic_1"/>
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                <inhomogeneousParameter id="PathLengthOver_apical" variable="p" metric="Path Length from root">
                    <proximal translationStart="0.000000e+00"/>
                </inhomogeneousParameter>
            </segmentGroup>
            <segmentGroup id="axonal">
                <include segmentGroup="axon_0"/>
                <include segmentGroup="axon_1"/>
            </segmentGroup>
            <segmentGroup id="somatic">
                <include segmentGroup="soma_0"/>
            </segmentGroup>
            <segmentGroup id="soma_group">
                <include segmentGroup="somatic"/>
            </segmentGroup>
            <segmentGroup id="axon_group">
                <include segmentGroup="axonal"/>
            </segmentGroup>
            <segmentGroup id="dendrite_group">
                <include segmentGroup="basal"/>
                <include segmentGroup="apical"/>
            </segmentGroup>
        </morphology>
        <biophysicalProperties id="biophys">
            <membraneProperties>

                <channelDensity id="all_g_pas" ionChannel="pas" condDensity="3e-5 S_per_cm2" erev="-75 mV" ion="non_specific"/>

                <channelDensity id="axonal_gNaTa_tbar_NaTa_t" ionChannel="NaTa_t" condDensity="3.429725 S_per_cm2" erev="50.0 mV" segmentGroup="axonal" ion="na"/>
                <!--<channelDensity id="axonal_gNap_Et2bar_Nap_Et2" ionChannel="Nap_Et2" condDensity="0.009803 S_per_cm2" erev="50.0 mV" segmentGroup="axonal" ion="na"/>-->

                 <!-- <channelDensity id="somatic_gNaTs2_tbar_NaTs2_t" ionChannel="NaTs2_t" condDensity="0.926705 S_per_cm2" erev="50.0 mV" segmentGroup="somatic" ion="na"/>

              <channelDensity id="apical_gNaTs2_tbar_NaTs2_t" ionChannel="NaTs2_t" condDensity="0.012009 S_per_cm2" erev="50.0 mV" segmentGroup="apical" ion="na"/>-->

                <channelDensity id="axonal_gK_Tstbar_K_Tst" ionChannel="K_Tst" condDensity="0.001035 S_per_cm2" erev="-85.0 mV" segmentGroup="axonal" ion="k"/>
                <channelDensity id="axonal_gK_Pstbar_K_Pst" ionChannel="K_Pst" condDensity="0.959296 S_per_cm2" erev="-85.0 mV" segmentGroup="axonal" ion="k"/>
                <!--
                <channelDensity id="apical_gImbar_Im" ionChannel="Im" condDensity="0.00074 S_per_cm2" erev="-85.0 mV" segmentGroup="apical" ion="k"/>-->

                <!--
                <channelDensity id="axonal_gSKv3_1bar_SKv3_1" ionChannel="SKv3_1" condDensity="0.094971 S_per_cm2" erev="-85.0 mV" segmentGroup="axonal" ion="k"/>
                <channelDensity id="somatic_gSKv3_1bar_SKv3_1" ionChannel="SKv3_1" condDensity="0.102517 S_per_cm2" erev="-85.0 mV" segmentGroup="somatic" ion="k"/>
                <channelDensity id="apical_gSKv3_1bar_SKv3_1" ionChannel="SKv3_1" condDensity="0.000513 S_per_cm2" erev="-85.0 mV" segmentGroup="apical" ion="k"/>
                <channelDensity id="somatic_gSK_E2bar_SK_E2" ionChannel="SK_E2" condDensity="0.099433 S_per_cm2" erev="-85.0 mV" segmentGroup="somatic" ion="k"/>
                <channelDensity id="axonal_gSK_E2bar_SK_E2" ionChannel="SK_E2" condDensity="0.008085 S_per_cm2" erev="-85.0 mV" segmentGroup="axonal" ion="k"/>

                <channelDensity id="somatic_gIhbar_Ih" ionChannel="Ih" condDensity="8e-05 S_per_cm2" erev="-45.0 mV" segmentGroup="somatic" ion="hcn"/>
                <channelDensity id="basal_gIhbar_Ih" ionChannel="Ih" condDensity="8e-05 S_per_cm2" erev="-45.0 mV" segmentGroup="basal" ion="hcn"/>
                <channelDensityNonUniform id="apical_gIhbar_Ih" ionChannel="Ih" erev="-45.0 mV" ion="hcn">
                    <variableParameter parameter="condDensity" segmentGroup="apical">
                        <inhomogeneousValue inhomogeneousParameter="PathLengthOver_apical" value="1e4 * ((-0.869600 + 2.087000*exp((p-0.000000)*0.003100))*0.000080)"/>
                    </variableParameter>
                </channelDensityNonUniform>

                <channelDensityNernst id="axonal_gCa_HVAbar_Ca_HVA" ionChannel="Ca_HVA" condDensity="0.000306 S_per_cm2" segmentGroup="axonal" ion="ca"/>
                <channelDensityNernst id="axonal_gCa_LVAstbar_Ca_LVAst" ionChannel="Ca_LVAst" condDensity="5e-05 S_per_cm2" segmentGroup="axonal" ion="ca"/>
                <channelDensityNernst id="somatic_gCa_HVAbar_Ca_HVA" ionChannel="Ca_HVA" condDensity="0.000374 S_per_cm2" segmentGroup="somatic" ion="ca"/>
                <channelDensityNernst id="somatic_gCa_LVAstbar_Ca_LVAst" ionChannel="Ca_LVAst" condDensity="0.000778 S_per_cm2" segmentGroup="somatic" ion="ca"/>
                -->

                <specificCapacitance value="2.0 uF_per_cm2" segmentGroup="all"/>

                <initMembPotential value="-80 mV"/>

            </membraneProperties>

            <intracellularProperties>
                <species segmentGroup="axonal" id="ca" concentrationModel="CaDynamics_E2_NML2__cADpyr_229_axonal" ion="ca" initialConcentration="5.0E-11 mol_per_cm3" initialExtConcentration="2.0E-6 mol_per_cm3"/>
                <species segmentGroup="somatic" id="ca" concentrationModel="CaDynamics_E2_NML2__cADpyr_229_somatic" ion="ca" initialConcentration="5.0E-11 mol_per_cm3" initialExtConcentration="2.0E-6 mol_per_cm3"/>
                <resistivity value="100 ohm_cm"/>
            </intracellularProperties>

        </biophysicalProperties>

    </cell>
</neuroml>
