// SBML level 2 version 2
// This SBML file has been generated by org.neuroml.export (see https://github.com/NeuroML/org.neuroml.export) org.neuroml.export v1.10.0 org.neuroml.model v1.10.0 jLEMS v0.11.0 Export of model: Components: fn1 (Type: fitzHughNagumoCell: I=0.8 (dimensionless) SEC=1.0 (SI time)) net1 (Type: network) sim1 (Type: Simulation: length=200.0 (SI time) step=0.01 (SI time))

model net1()

  // Compartments:
  compartment fnPop1_0 = 1;

  // Parameters:
  I = 0.8;
  SEC = 1;
  V = 0;
  W = 0;

  // Rate rules:
  V' = (V - V^3/3 - W + I)/SEC;
  W' = 0.08*(V + (0.7 - 0.8*W))/SEC;
end
