// SBML level 2 version 2
// This SBML file has been generated by org.neuroml.export (see https://github.com/NeuroML/org.neuroml.export) org.neuroml.export v1.10.0 org.neuroml.model v1.10.0 jLEMS v0.11.0 Export of model: Components: hr_regular0 (Type: hindmarshRoseCell: a=1.0 (dimensionless) b=3.0 (dimensionless) c=-3.0 (dimensionless) d=5.0 (dimensionless) I=5.0 (dimensionless) r=0.002 (dimensionless) s=4.0 (dimensionless) x1=-1.3 (dimensionless) x0=-1.1 (dimensionless) y0=-9.0 (dimensionless) z0=1.0 (dimensionless) SEC=1.0 (SI time)) hr_regular (Type: hindmarshRoseCell: a=1.0 (dimensionless) b=3.0 (dimensionless) c=-3.0 (dimensionless) d=5.0 (dimensionless) I=5.0 (dimensionless) r=0.002 (dimensionless) s=4.0 (dimensionless) x1=-1.3 (dimensionless) x0=-1.1 (dimensionless) y0=-9.0 (dimensionless) z0=1.0 (dimensionless) SEC=1.0 (SI time)) net1 (Type: network) sim1 (Type: Simulation: length=1400.0 (SI time) step=0.0025 (SI time))

model net1()

  // Compartments:
  compartment hr_regular_pop_0 = 1;

  // Parameters:
  a = 1;
  b = 3;
  c = -3;
  d = 5;
  I = 5;
  r = 0.002;
  s = 4;
  x1 = -1.3;
  x0 = -1.1;
  y0 = -9;
  z0 = 1;
  SEC = 1;
  x = x0;
  y = y0;
  z = z0;

  // Assignment rules:
  phi := y - a*x*x*x + b*x*x + I;
  chi := c - d*x*x - y;
  rho := s*(x - x1) - z;

  // Rate rules:
  x' = (phi - z)/SEC;
  y' = chi/SEC;
  z' = r*(rho/SEC);
end
